x[1] := 6*15
y[1] := 6*15
x[2] := 6*15
y[2] := 8*15
x[3] := 8*15
y[3] := 6*15
x[4] := x[1]
y[4] := y[1]
ϕ := 90
ϕ_rad := ϕ*π/180
dx2 := 2
dy2 := 3
T(dx, dy) := [1, 0, -dx; 0, 1, -dy; 0, 0, 1]
R(ϕ) := [cos(ϕ), sin(ϕ), 0; -sin(ϕ), cos(ϕ), 0; 0, 0, 1]
K := [x[1], x[2], x[3]; y[1], y[2], y[3]; 1, 1, 1]
